*Heading
** Job name: Abaqus Model name: Abaqus
** Generated by: Abaqus/CAE 2017
*Preprint, echo=NO, model=NO, history=NO, contact=NO
**
** PARTS
**
*Part, name=Bar
*Node
      1,         500.,          10.,          10.
      2,         500.,           8.,          10.
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*Element, type=C3D8
   1,   37,   38,   44,   43,    1,    2,    8,    7
   2,   38,   39,   45,   44,    2,    3,    9,    8
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*Nset, nset=_PickedSet2, internal, generate
    1,  9036,     1
*Elset, elset=_PickedSet2, internal, generate
    1,  6250,     1
*Orientation, name=Ori-1
1., 0., 0., 0., 1., 0.
3, 0.
** Section: Solid
*Solid Section, elset=_PickedSet2, orientation=Ori-1, material=Ortho3D
,
*End Part
**
**
** ASSEMBLY
**
*Assembly, name=Assembly
**
*Instance, name=Bar-1, part=Bar
*End Instance
**
*Nset, nset=_PickedSet4, internal, instance=Bar-1, generate
 9001,  9036,     1
*Elset, elset=_PickedSet4, internal, instance=Bar-1, generate
 6226,  6250,     1
*Elset, elset=__PickedSurf5_S6, internal, instance=Bar-1, generate
    1,  6246,     5
*Surface, type=ELEMENT, name=_PickedSurf5, internal
__PickedSurf5_S6, S6
*End Assembly
**
** MATERIALS
**
*Material, name=Ortho3D
*Elastic, type=ENGINEERING CONSTANTS
135000.,10000.,10000.,  0.25,  0.25,  0.45, 4300., 4300.
 3000.,
*Material, name=UserMAT
*User Material, constants=2
200000., 0.3
**
** BOUNDARY CONDITIONS
**
** Name: Fixed Type: Symmetry/Antisymmetry/Encastre
*Boundary
_PickedSet4, ENCASTRE
** ----------------------------------------------------------------
**
** STEP: Load
**
*Step, name=Load, nlgeom=NO
*Static
1., 1., 1e-05, 1.
**
** LOADS
**
** Name: Pressure   Type: Pressure
*Dsload
_PickedSurf5, P, 0.01
**
** OUTPUT REQUESTS
**
*Restart, write, frequency=0
**
** FIELD OUTPUT: F-Output-1
**
*Output, field, variable=PRESELECT
**
** HISTORY OUTPUT: H-Output-1
**
*Output, history, variable=PRESELECT
*End Step
